*Heading
** Job name: Job-1 Model name: Model-1
** Generated by: Abaqus/CAE 6.14-5
*Preprint, echo=NO, model=NO, history=NO, contact=NO
**
** PARTS
**
*Part, name=Part-1
*Node
      1,           1.,           1.,           8.
      2,           1.,           0.,           8.
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*Element, type=C3D8R
 1, 28, 29, 32, 31,  1,  2,  5,  4
 2, 29, 30, 33, 32,  2,  3,  6,  5
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*Nset, nset=Set-1, generate
  1,  81,   1
*Elset, elset=Set-1, generate
  1,  32,   1
** Section: Section-1
*Solid Section, elset=Set-1, material=Material-1
,
*End Part
**
**
** ASSEMBLY
**
*Assembly, name=Assembly
**
*Instance, name=Part-1-1, part=Part-1
*End Instance
**
*Nset, nset=Set-1, instance=Part-1-1
 25, 26, 27, 52, 53, 54, 79, 80, 81
*Elset, elset=Set-1, instance=Part-1-1
 15, 16, 31, 32
*End Assembly
**
** MATERIALS
**
*Material, name=Material-1
*Density
3800.,
*Elastic
 6.8e+06, 0.35
** ----------------------------------------------------------------
**
** STEP: Step-1
**
*Step, name=Step-1, nlgeom=NO, perturbation
*Frequency, eigensolver=Lanczos, acoustic coupling=on, normalization=displacement
20, , , , ,
**
** BOUNDARY CONDITIONS
**
** Name: BC-1 Type: Symmetry/Antisymmetry/Encastre
*Boundary
Set-1, PINNED
**
** OUTPUT REQUESTS
**
*Restart, write, frequency=0
**
** FIELD OUTPUT: F-Output-1
**
*ELEMENT MATRIX OUTPUT, ELSET=Set-1, STIFFNESS=YES, OUTPUT FILE=USER DEFINED, FILE NAME=ElementStiffness
*Output, field, variable=PRESELECT
*End Step
*Step, name=FEAuto
*matrix generate, load
*matrix output, load, FORMAT=COORDINATE
*Boundary
Set-1, PINNED
*End step
