*Heading
** Job name: Job-2 Model name: Model-1
** Generated by: Abaqus/CAE 6.14-5
*Preprint, echo=NO, model=NO, history=NO, contact=NO
**
** PARTS
**
*Part, name=Part-1
*Node
      1,           1.,           1.,           8.
      2,           1.,           0.,           8.
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*Element, type=C3D8R
 1, 28, 29, 32, 31,  1,  2,  5,  4
 2, 29, 30, 33, 32,  2,  3,  6,  5
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*Nset, nset=Set-1, generate
  1,  81,   1
*Elset, elset=Set-1, generate
  1,  32,   1
** Section: Section-1
*Solid Section, elset=Set-1, material=Material-1
,
*End Part
**
**
** ASSEMBLY
**
*Assembly, name=Assembly
**
*Instance, name=Part-1-1, part=Part-1
*End Instance
**
*Nset, nset=Set-1, instance=Part-1-1
 25, 26, 27, 52, 53, 54, 79, 80, 81
*Elset, elset=Set-1, instance=Part-1-1
 15, 16, 31, 32
*Nset, nset=Set-2, instance=Part-1-1
 25, 26, 27, 52, 53, 54, 79, 80, 81
*Elset, elset=Set-2, instance=Part-1-1
 15, 16, 31, 32
*Nset, nset=Set-4, instance=Part-1-1
 25, 26, 27, 52, 53, 54, 79, 80, 81
*Elset, elset=Set-4, instance=Part-1-1
 15, 16, 31, 32
*Nset, nset=Set-5, instance=Part-1-1
 25, 26, 27, 52, 53, 54, 79, 80, 81
*Elset, elset=Set-5, instance=Part-1-1
 15, 16, 31, 32
*Nset, nset=top, instance=Part-1-1
  1,  3, 55, 57
*End Assembly
*Amplitude, name=Amp-1
             0.,              0.,            0.01,              0.,            0.02,              0.,            0.03,              0.
           0.04,              0.,            0.05,              0.,            0.06,              0.,            0.07,              0.
           0.08,              0.,            0.09,              0.,             0.1,              0.,            0.11,              0.
           0.12,              0.,            0.13,              0.,            0.14,              0.,            0.15,              0.
           0.16,              0.,            0.17,              0.,            0.18,              0.,            0.19,              0.
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          19.96,        -0.11162,           19.97,        -0.09714,           19.98,        -0.08181,           19.99,        -0.06589
**
** MATERIALS
**
*Material, name=Material-1
*Damping, alpha=0.25, beta=0.25
*Density
3800.,
*Elastic
 6.8e+06, 0.35
** ----------------------------------------------------------------
**
** STEP: Step-2
**
*Step, name=Step-2, nlgeom=NO, inc=2000
*Dynamic,direct
0.01,20.,
**
** BOUNDARY CONDITIONS
**
** Name: BC-2 Type: Acceleration/Angular acceleration
*Boundary, amplitude=Amp-1, type=ACCELERATION
Set-2, 1, 1, 1.
** Name: BC-3 Type: Displacement/Rotation
*Boundary
Set-4, 2, 2
Set-4, 3, 3
**
** OUTPUT REQUESTS
**
*Restart, write, frequency=0
**
** FIELD OUTPUT: F-Output-2
**
*Output, field, frequency=1
*Node Output
A, U, V
*Output, history, frequency=0
*End Step
